t_val := π + 2.8
r_small := 2
r_big := 4.472135955  # Такие же параметры в ellipse_research.ggb
# [plot: sin(t) vs t]
# [plot: cos(t) vs t]
C(t) := [cos(t)*r_big; sin(t)*r_small]
C'(t) := d/dt(C(t)) → [-4.472135955*sin(t); 2.0*cos(t)]
k := C'(t_val)[1]/C'(t_val)[0] → 1.257879243
C'(t_val) → [1.49811255081; 1.88444468134]
f'(x) := k*(x - cos(t_val)*r_big) + sin(t_val)*r_small
# [plot: C(t)[1] vs C(t)[0]]
# [plot: C'(t_val)[1] vs C'(t_val)[0]]
f(x) := k*x
# [plot: C(t)[1], f'(x) vs C(t)[0], x]
