r := 1
step := 1
t_param := 126.13*π/180
C(t) := [cos(t)*r; sin(t)*r; step/(2*π)*t]
C'(t) := d/dt(C(t)) → [-sin(t); cos(t); 1/(2*π)]
# [3D plot: C(t)]
C'(t_param) → [-0.807681270663; -0.589619339082; 1/(2*π)]
C(t_param + 2*π) == C(t_param) + [0; 0; step] → 1
