t_val := π + 2.8
R := 3
# [plot: sin(t) vs t]
# [plot: cos(t) vs t]
C(t) := [cos(t)*R; sin(t)*R]
C'(t) := d/dt(C(t)) → [-(3*sin(t)); 3*cos(t)]
C'(t_val) → [1.00496445047; 2.82666702201]
k := C'(t_val)[1]/C'(t_val)[0] → 2.81270349483
# [plot: C(t)[1] vs C(t)[0]]
# [plot: C'(t_val)[1] vs C'(t_val)[0]]
f'(x) := k*(x - cos(t_val)*R) + sin(t_val)*R
f(x) := k*x
# [plot: C(t)[1], f'(x) vs C(t)[0], x]
